# ╔═══════════════════════════════════════════════════════════════════════════════════════════════════════════════════════════════════════════════════════════════════════════════════════════════════════════════════════════════════════════════════════╗
# ║                                                                                    PIZZA.SCRIPT FILE v1.0 | License: GPLv3 | Email: olivier.vitrac@agroparistech.fr                                                                                   ║
# ║═══════════════════════════════════════════════════════════════════════════════════════════════════════════════════════════════════════════════════════════════════════════════════════════════════════════════════════════════════════════════════════║
# ║  <script:pipescript:script:example2.d_slice_None_-1:0:script:LammpsHeaderBox:headerinit...script:LammpsFooterPreview:footerpreview->script:example2.d_slice_-1_None:16:script:LammpsHeaderBox:headerinit...script:LammpsFooterPreview:footerpreview>  ║
# ║                                                                                                   Initialized with 35 definitions | Verbosity: None                                                                                                   ║
# ║                                                                                                        Persistent file: "True" | Folder: "/tmp"                                                                                                       ║
# ║═══════════════════════════════════════════════════════════════════════════════════════════════════════════════════════════════════════════════════════════════════════════════════════════════════════════════════════════════════════════════════════║
# ║                                                                                             Generated on: olivi@LX-Olivier2023:/home/olivi/han/dev/Pizza3                                                                                             ║
# ║                                                                                                        Wednesday, January 08, 2025 at 09:41:30                                                                                                        ║
# ╚═══════════════════════════════════════════════════════════════════════════════════════════════════════════════════════════════════════════════════════════════════════════════════════════════════════════════════════════════════════════════════════╝


#================================================================================================================================================================================================================================================#
#                                                                                                   PIPESCRIPT with 18 scripts | Verbosity: 1                                                                                                    #
#================================================================================================================================================================================================================================================#
#  From: <script:example2.d_slice_None_-1:0:script:LammpsHeaderBox:headerinit...script:LammpsFooterPreview:footerpreview> To: <script:example2.d_slice_-1_None:16:script:LammpsHeaderBox:headerinit...script:LammpsFooterPreview:footerpreview>  #
#================================================================================================================================================================================================================================================#

# [1 of 18 from 0:17] <script:example2.d_slice_None_-1:0:script:LammpsHeaderBox:headerinit...script:LammpsFooterPreview:footerpreview>
dimension    3
units        si
boundary     f f f
atom_style   smd
atom_modify  map array
comm_modify  vel yes
neigh_modify every 10 delay 0 check yes
newton       off

# [2 of 18 from 0:17] <script:example2.d_slice_None_-1:1:script:LammpsHeaderBox:headerinit...script:LammpsFooterPreview:footerpreview>
lattice sc 0.001 spacing 0.001 0.001 0.001

# [3 of 18 from 0:17] <script:example2.d_slice_None_-1:2:script:LammpsHeaderBox:headerinit...script:LammpsFooterPreview:footerpreview>
region box block -0.04 0.04 -0.04 0.04 -0.03 0.03 units box
create_box	3 box

# [4 of 18 from 0:17] <script:example2.d_slice_None_-1:3:script:LammpsHeaderBox:headerinit...script:LammpsFooterPreview:footerpreview> :: no content

# [5 of 18 from 0:17] <script:example2.d_slice_None_-1:4:script:LammpsHeaderBox:headerinit...script:LammpsFooterPreview:footerpreview> :: no content

# [6 of 18 from 0:17] <script:example2.d_slice_None_-1:5:script:LammpsHeaderBox:headerinit...script:LammpsFooterPreview:footerpreview> :: no content

# [7 of 18 from 0:17] <script:example2.d_slice_None_-1:6:script:LammpsHeaderBox:headerinit...script:LammpsFooterPreview:footerpreview>
region LowerCylinder cylinder z 0 0 0.03 -0.03 -0.01 units box

# [8 of 18 from 0:17] <script:example2.d_slice_None_-1:7:script:LammpsHeaderBox:headerinit...script:LammpsFooterPreview:footerpreview>
region CentralCylinder cylinder z 0 0 0.03 -0.01 0.01 units box

# [9 of 18 from 0:17] <script:example2.d_slice_None_-1:8:script:LammpsHeaderBox:headerinit...script:LammpsFooterPreview:footerpreview>
region UpperCylinder cylinder z 0 0 0.03 0.01 0.03 units box

# [10 of 18 from 0:17] <script:example2.d_slice_None_-1:9:script:LammpsHeaderBox:headerinit...script:LammpsFooterPreview:footerpreview>
create_atoms 1 region LowerCylinder

# [11 of 18 from 0:17] <script:example2.d_slice_None_-1:10:script:LammpsHeaderBox:headerinit...script:LammpsFooterPreview:footerpreview>
create_atoms 2 region CentralCylinder

# [12 of 18 from 0:17] <script:example2.d_slice_None_-1:11:script:LammpsHeaderBox:headerinit...script:LammpsFooterPreview:footerpreview>
create_atoms 3 region UpperCylinder

# [13 of 18 from 0:17] <script:example2.d_slice_None_-1:12:script:LammpsHeaderBox:headerinit...script:LammpsFooterPreview:footerpreview>
group lower type 1
group middle type 2
group upper type 3
group all union lower middle upper
group external subtract all middle

# [14 of 18 from 0:17] <script:example2.d_slice_None_-1:13:script:LammpsHeaderBox:headerinit...script:LammpsFooterPreview:footerpreview>
mass 1 2.0
mass 2 1.0
mass 3 1.0

# [15 of 18 from 0:17] <script:example2.d_slice_None_-1:14:script:LammpsHeaderBox:headerinit...script:LammpsFooterPreview:footerpreview>
variable n_all equal "count(all)"
variable n_lower equal "count(lower)"
variable n_middle equal "count(middle)"
variable n_upper equal "count(upper)"

# [16 of 18 from 0:17] <script:example2.d_slice_None_-1:15:script:LammpsHeaderBox:headerinit...script:LammpsFooterPreview:footerpreview>
print "Number of atoms in all: ${n_all}"
print "Number of atoms in lower: ${n_lower}"
print "Number of atoms in middle: ${n_middle}"
print "Number of atoms in upper: ${n_upper}"

# [17 of 18 from 0:17] <script:scriptobject script:scriptobject>
group 	 lowerAtoms 	type 	 1
group 	 centralAtoms 	type 	 2
group 	 upperAtoms 	type 	 3
pair_style      hybrid/overlay smd/ulsph *DENSITY_CONTINUITY *VELOCITY_GRADIENT *NO_GRADIENT_CORRECTION &
smd/tlsph smd/hertz 1.5
pair_coeff      1 1 smd/tlsph *COMMON 1050 10500000.0 0.3 1.0 0.0 10.0 1.0 &
*STRENGTH_LINEAR_PLASTIC 1050000.0 0 &
*EOS_LINEAR &
*END
pair_coeff      2 2 smd/tlsph *COMMON 1000 2500000.0 0.3 1.0 0.0 10.0 1.0 &
*STRENGTH_LINEAR_PLASTIC 250000.0 0 &
*EOS_LINEAR &
*END
pair_coeff      3 3 smd/tlsph *COMMON 1300 65000000.0 0.1 1.0 0.0 10.0 1.0 &
*STRENGTH_LINEAR_PLASTIC 6500000.0 0 &
*EOS_LINEAR &
*END
pair_coeff      1 2 smd/hertz 262500.0
pair_coeff      1 3 smd/hertz 262500.0
pair_coeff      2 3 smd/hertz 250000.0

# [18 of 18 from 0:17] <script:example2.d_slice_-1_None:16:script:LammpsHeaderBox:headerinit...script:LammpsFooterPreview:footerpreview>
dump initial_dump all custom 1 dump.initial.region_SimulationBox id type x y z
run 0
